// SBML level 3 version 1

model main()

  // Compartments:
  compartment Cell = 1;

  // Species:
  species IGF in Cell = 0;
  species IGFR in Cell = 0;
  species IGFR_p in Cell = 0;
  species IGF__IGFR in Cell = 0;
  species IGF__IGFR_p in Cell = 0;
  species PTB1B in Cell = 0;
  species IGF__IGFR_p__PTB1B in Cell = 0;
  species IGFR_p__PTB1B in Cell = 0;
  species IRS in Cell = 0;
  species IRS_p in Cell = 0;
  species IRS__IGF__IGFR_p in Cell = 0;
  species IRS_p__IGF__IGFR_p in Cell = 0;
  species IRS__IGFR_p in Cell = 0;
  species IRS_p__IGFR_p in Cell = 0;
  species PI3K in Cell = 0;
  species IRS_p__PI3K in Cell = 0;
  species AKT in Cell = 0;
  species IRS_p__PI3K__AKT in Cell = 0;
  species IRS_p__PI3K__AKT_p in Cell = 0;
  species AKT_p in Cell = 0;
  species mTor_p__IRS_p in Cell = 0;
  species mTor_p__IRS_p__PI3K in Cell = 0;
  species Pase in Cell = 0;
  species Pase__AKT_p in Cell = 0;
  species mTor_p__IRS in Cell = 0;
  species Grb2SOS in Cell = 0;
  species IRS_p__PI3K__Grb2SOS in Cell = 0;
  species IRS_p__Grb2SOS in Cell = 0;
  species RasGDP in Cell = 0;
  species RasGTP in Cell = 0;
  species IRS_p__PI3K__Grb2SOS__RasGDP in Cell = 0;
  species IRS_p__PI3K__Grb2SOS__RasGTP in Cell = 0;
  species IRS_p__Grb2SOS__RasGDP in Cell = 0;
  species IRS_p__Grb2SOS__RasGTP in Cell = 0;
  species mTor_p__IRS_p__Grb2SOS in Cell = 0;
  species mTor_p__IRS_p__PI3K__Grb2SOS in Cell = 0;
  species AKT_p__RasGTP in Cell = 0;
  species MEK in Cell = 0;
  species MEK_p in Cell = 0;
  species RasGTP__MEK in Cell = 0;
  species RasGTP__MEK_p in Cell = 0;
  species P1 in Cell = 0;
  species P1__MEK_p in Cell = 0;
  species GTPase in Cell = 0;
  species RasGTP__GTPase in Cell = 0;
  species AKT_p__RasGDP in Cell = 0;
  species ERK in Cell = 0;
  species MEK_p__ERK in Cell = 0;
  species MKP in Cell = 0;
  species MKP__ERK_p in Cell = 0;
  species ERK_p in Cell = 0;
  species MEK_p__ERK_p in Cell = 0;
  species ERK_p_p in Cell = 0;
  species MKP__ERK_p_p in Cell = 0;
  species mTor_p__IRS_p__PI3K__AKT in Cell = 0;
  species mTor in Cell = 0;
  species mTor_p in Cell = 0;
  species AKT_p__mTor in Cell = 0;
  species ERK_p_p__IRS_p__Grb2SOS in Cell = 0;
  species ERK_p_p__IRS_p__PI3K__Grb2SOS in Cell = 0;
  species PI3Kinh in Cell = 0;
  species PI3K__PI3Kinh in Cell = 0;
  species IRS_p__PI3K__PI3Kinh in Cell = 0;
  species mTor_p__IRS_p__PI3K__PI3Kinh in Cell = 0;
  species AKTinh in Cell = 0;
  species AKT__AKTinh in Cell = 0;
  species IRS_p__PI3K__AKT__AKTinh in Cell = 0;
  species mTor_p__IRS_p__PI3K__AKT__AKTinh in Cell = 0;
  species IGFRinh in Cell = 0;
  species IGFR__IGFRinh in Cell = 0;
  species mTor_p__IRS_p__Grb2SOS__RasGDP in Cell = 0;
  species mTor_p__IRS_p__PI3K__Grb2SOS__RasGDP in Cell = 0;
  species mTorinh in Cell = 0;
  species mTor__mTorinh in Cell = 0;

  // Reactions:
  rxn_0: IGF + IGFR => IGF__IGFR; 1;
  rxn_1: IGF__IGFR => IGF__IGFR_p; 1;
  rxn_2: IGF + IGFR_p => IGF__IGFR_p; 1;
  rxn_3: IGF__IGFR_p + PTB1B => IGF__IGFR_p__PTB1B; 1;
  rxn_4: IGFR_p + PTB1B => IGFR_p__PTB1B; 1;
  rxn_5: IGF__IGFR + PTB1B => IGF__IGFR_p__PTB1B; 1;
  rxn_6: IGFR + PTB1B => IGFR_p__PTB1B; 1;
  rxn_7: IRS + IGF__IGFR_p => IRS__IGF__IGFR_p; 1;
  rxn_8: IRS__IGF__IGFR_p => IRS_p__IGF__IGFR_p; 1;
  rxn_9: IRS + IGFR_p => IRS__IGFR_p; 1;
  rxn_10: IRS__IGFR_p => IRS_p__IGFR_p; 1;
  rxn_11: IRS_p + IGFR_p => IRS_p__IGFR_p; 1;
  rxn_12: IRS_p + IGF__IGFR_p => IRS_p__IGF__IGFR_p; 1;
  rxn_13: IRS_p + PI3K => IRS_p__PI3K; 1;
  rxn_14: IRS_p__PI3K + AKT => IRS_p__PI3K__AKT; 1;
  rxn_15: IRS_p__PI3K__AKT => IRS_p__PI3K__AKT_p; 1;
  rxn_16: IRS_p__PI3K__AKT => AKT_p + IRS_p__PI3K; 1;
  rxn_17: Pase + AKT_p => Pase__AKT_p; 1;
  rxn_18: Pase + AKT => Pase__AKT_p; 1;
  rxn_19: mTor + AKT_p => AKT_p__mTor; 1;
  rxn_20: AKT_p__mTor => mTor_p + AKT_p; 1;
  rxn_21: IRS_p__PI3K__AKT + mTor_p => mTor_p__IRS_p__PI3K__AKT; 1;
  rxn_22: IRS_p + mTor_p => mTor_p__IRS_p; 1;
  rxn_23: IRS_p__PI3K + mTor_p => mTor_p__IRS_p__PI3K; 1;
  rxn_24: IRS + mTor_p => mTor_p__IRS; 1;
  rxn_25: IRS_p__Grb2SOS + mTor_p => mTor_p__IRS_p__Grb2SOS; 1;
  rxn_26: IRS_p__PI3K__Grb2SOS + mTor_p => mTor_p__IRS_p__PI3K__Grb2SOS; 1;
  rxn_27: IRS_p__PI3K__PI3Kinh + mTor_p => mTor_p__IRS_p__PI3K__PI3Kinh; 1;
  rxn_28: IRS_p__PI3K__AKT__AKTinh + mTor_p => mTor_p__IRS_p__PI3K__AKT__AKTinh; 1;
  rxn_29: IRS_p__Grb2SOS__RasGDP + mTor_p => mTor_p__IRS_p__Grb2SOS__RasGDP; 1;
  rxn_30: IRS_p__PI3K__Grb2SOS__RasGDP + mTor_p => mTor_p__IRS_p__PI3K__Grb2SOS__RasGDP; 1;
  rxn_31: Grb2SOS + IRS_p => IRS_p__Grb2SOS; 1;
  rxn_32: Grb2SOS + IRS_p__PI3K => IRS_p__PI3K__Grb2SOS; 1;
  rxn_33: IRS_p__Grb2SOS + RasGDP => IRS_p__Grb2SOS__RasGDP; 1;
  rxn_34: IRS_p__PI3K__Grb2SOS + RasGDP => IRS_p__PI3K__Grb2SOS__RasGDP; 1;
  rxn_35: IRS_p__Grb2SOS__RasGDP => RasGTP + IRS_p__Grb2SOS; 1;
  rxn_36: IRS_p__PI3K__Grb2SOS__RasGDP => RasGTP + IRS_p__PI3K__Grb2SOS; 1;
  rxn_37: AKT_p + RasGDP => AKT_p__RasGDP; 1;
  rxn_38: AKT_p + RasGTP => AKT_p__RasGTP; 1;
  rxn_39: RasGTP + GTPase => RasGTP__GTPase; 1;
  rxn_40: RasGTP__GTPase => GTPase + RasGDP; 1;
  rxn_41: RasGTP + MEK => RasGTP__MEK; 1;
  rxn_42: RasGTP__MEK => RasGTP__MEK_p; 1;
  rxn_43: RasGTP__MEK_p => MEK_p + RasGTP; 1;
  rxn_44: P1 + MEK_p => P1__MEK_p; 1;
  rxn_45: P1__MEK_p => P1 + MEK; 1;
  rxn_46: ERK + MEK_p => MEK_p__ERK; 1;
  rxn_47: MEK_p__ERK => MEK_p + ERK_p; 1;
  rxn_48: MKP + ERK_p => MKP__ERK_p; 1;
  rxn_49: MKP__ERK_p => MKP + ERK; 1;
  rxn_50: ERK_p + MEK_p => MEK_p__ERK_p; 1;
  rxn_51: MEK_p__ERK_p => ERK_p_p + MEK_p; 1;
  rxn_52: ERK_p_p + MKP => MKP__ERK_p_p; 1;
  rxn_53: MKP__ERK_p_p => ERK_p + MKP; 1;
  rxn_54: ERK_p_p + IRS_p__Grb2SOS => ERK_p_p__IRS_p__Grb2SOS; 1;
  rxn_55: ERK_p_p + IRS_p__PI3K__Grb2SOS => ERK_p_p__IRS_p__PI3K__Grb2SOS; 1;
  rxn_56: PI3Kinh + PI3K => PI3K__PI3Kinh; 1;
  rxn_57: PI3Kinh + IRS_p__PI3K => IRS_p__PI3K__PI3Kinh; 1;
  rxn_58: PI3K__PI3Kinh + IRS_p => IRS_p__PI3K__PI3Kinh; 1;
  rxn_59: AKTinh + AKT => AKT__AKTinh; 1;
  rxn_60: AKTinh + IRS_p__PI3K__AKT => IRS_p__PI3K__AKT__AKTinh; 1;
  rxn_61: AKT__AKTinh + IRS_p__PI3K => IRS_p__PI3K__AKT__AKTinh; 1;
  rxn_62: IGFR + IGFRinh => IGFR__IGFRinh; 1;
  rxn_63: mTorinh + mTor => mTor__mTorinh; 1;
end
