// SBML level 3 version 1

model main()

  // Compartments:
  compartment Cell = 1;

  // Species:
  substanceOnly species $IGF in Cell = 1.35e-9;
  substanceOnly species IGFR in Cell = 40000;
  substanceOnly species IGFR_p in Cell = 0;
  substanceOnly species IGF__IGFR in Cell = 0;
  substanceOnly species IGF__IGFR_p in Cell = 0;
  substanceOnly species PTB1B in Cell = 60000;
  substanceOnly species IGF__IGFR_p__PTB1B in Cell = 0;
  substanceOnly species IGFR_p__PTB1B in Cell = 0;
  substanceOnly species IRS in Cell = 123000;
  substanceOnly species IRS_p in Cell = 0;
  substanceOnly species IRS__IGF__IGFR_p in Cell = 0;
  substanceOnly species IRS_p__IGF__IGFR_p in Cell = 0;
  substanceOnly species IRS__IGFR_p in Cell = 0;
  substanceOnly species IRS_p__IGFR_p in Cell = 0;
  substanceOnly species PI3K in Cell = 200000;
  substanceOnly species IRS_p__PI3K in Cell = 0;
  substanceOnly species AKT in Cell = 5200000;
  substanceOnly species IRS_p__PI3K__AKT in Cell = 0;
  substanceOnly species IRS_p__PI3K__AKT_p in Cell = 0;
  substanceOnly species AKT_p in Cell = 0;
  substanceOnly species mTor_p__IRS_p in Cell = 0;
  substanceOnly species mTor_p__IRS_p__PI3K in Cell = 0;
  substanceOnly species Pase in Cell = 25000;
  substanceOnly species Pase__AKT_p in Cell = 0;
  substanceOnly species mTor_p__IRS in Cell = 0;
  substanceOnly species Grb2SOS in Cell = 53000;
  substanceOnly species IRS_p__PI3K__Grb2SOS in Cell = 0;
  substanceOnly species IRS_p__Grb2SOS in Cell = 0;
  substanceOnly species RasGDP in Cell = 122000;
  substanceOnly species RasGTP in Cell = 0;
  substanceOnly species IRS_p__PI3K__Grb2SOS__RasGDP in Cell = 0;
  substanceOnly species IRS_p__PI3K__Grb2SOS__RasGTP in Cell = 0;
  substanceOnly species IRS_p__Grb2SOS__RasGDP in Cell = 0;
  substanceOnly species IRS_p__Grb2SOS__RasGTP in Cell = 0;
  substanceOnly species mTor_p__IRS_p__Grb2SOS in Cell = 0;
  substanceOnly species mTor_p__IRS_p__PI3K__Grb2SOS in Cell = 0;
  substanceOnly species AKT_p__RasGTP in Cell = 0;
  substanceOnly species MEK in Cell = 2000000;
  substanceOnly species MEK_p in Cell = 0;
  substanceOnly species RasGTP__MEK in Cell = 0;
  substanceOnly species RasGTP__MEK_p in Cell = 0;
  substanceOnly species P1 in Cell = 200000;
  substanceOnly species P1__MEK_p in Cell = 0;
  substanceOnly species GTPase in Cell = 50000;
  substanceOnly species RasGTP__GTPase in Cell = 0;
  substanceOnly species AKT_p__RasGDP in Cell = 0;
  substanceOnly species ERK in Cell = 3670000;
  substanceOnly species MEK_p__ERK in Cell = 0;
  substanceOnly species MKP in Cell = 50000;
  substanceOnly species MKP__ERK_p in Cell = 0;
  substanceOnly species ERK_p in Cell = 0;
  substanceOnly species MEK_p__ERK_p in Cell = 0;
  substanceOnly species ERK_p_p in Cell = 0;
  substanceOnly species MKP__ERK_p_p in Cell = 0;
  substanceOnly species mTor_p__IRS_p__PI3K__AKT in Cell = 0;
  substanceOnly species mTor in Cell = 200000;
  substanceOnly species mTor_p in Cell = 0;
  substanceOnly species AKT_p__mTor in Cell = 0;
  substanceOnly species ERK_p_p__IRS_p__Grb2SOS in Cell = 0;
  substanceOnly species ERK_p_p__IRS_p__PI3K__Grb2SOS in Cell = 0;
  substanceOnly species PI3Kinh in Cell = 0;
  substanceOnly species PI3K__PI3Kinh in Cell = 0;
  substanceOnly species IRS_p__PI3K__PI3Kinh in Cell = 0;
  substanceOnly species mTor_p__IRS_p__PI3K__PI3Kinh in Cell = 0;
  substanceOnly species $AKTinh in Cell = 0;
  substanceOnly species AKT__AKTinh in Cell = 0;
  substanceOnly species IRS_p__PI3K__AKT__AKTinh in Cell = 0;
  substanceOnly species mTor_p__IRS_p__PI3K__AKT__AKTinh in Cell = 0;
  substanceOnly species $IGFRinh in Cell = 0;
  substanceOnly species IGFR__IGFRinh in Cell = 0;
  substanceOnly species mTor_p__IRS_p__Grb2SOS__RasGDP in Cell = 0;
  substanceOnly species mTor_p__IRS_p__PI3K__Grb2SOS__RasGDP in Cell = 0;
  substanceOnly species $mTorinh in Cell = 0;
  substanceOnly species mTor__mTorinh in Cell = 0;

  // Parameters:
  lig_time = 0;
  inh0 = 0;
  inh1 = 0;
  k1 = 400000;
  k1a = 400000;
  kd1 = 0.002;
  kd1a = 0.002;
  inh2 = 0;
  k2 = 1;
  inh3 = 0;
  k3 = 1e-7;
  k3a = 1e-7;
  kd3 = 0.001;
  kd3a = 0.001;
  inh4 = 0;
  k4 = 0;
  k4a = 0;
  kd4 = 1;
  kd4a = 1;
  k5 = 1e-6;
  k5a = 1e-6;
  kd5 = 0.001;
  kd5a = 0.001;
  k6 = 1;
  k6a = 1;
  k7 = 1e-7;
  k7a = 1e-7;
  kd7 = 0.005;
  kd7a = 0.005;
  k100 = 1e-6;
  k100a = 1e-6;
  kd100 = 0.001;
  kd100a = 0.001;
  k101 = 1e-5;
  k101a = 1e-5;
  kd101 = 0.001;
  kd101a = 0.001;
  k102 = 1;
  k103 = 1;
  k104 = 5e-9;
  kd104 = 0.001;
  k105 = 0;
  kd105 = 0.01;
  k106 = 5e-8;
  kd106 = 0.001;
  k107 = 1;
  k108 = 1e-7;
  k200 = 1e-7;
  k200a = 1e-7;
  kd200 = 0.001;
  kd200a = 0.001;
  k201 = 1e-5;
  k201a = 1e-5;
  kd201 = 0.001;
  kd201a = 0.001;
  k202 = 1;
  k202a = 1;
  k203 = 1e-7;
  k203a = 1e-8;
  k204 = 5e-8;
  kd204 = 0.001;
  k205 = 1;
  k206 = 1e-7;
  kd206 = 0.001;
  k207 = 1;
  k207a = 1;
  k208 = 2e-6;
  kd208 = 0.001;
  k209 = 1;
  k210 = 1.5e-5;
  k210a = 1e-5;
  kd210 = 0.001;
  kd210a = 0.001;
  k211 = 1;
  k211a = 1;
  k212 = 5e-7;
  k212a = 5e-7;
  kd212 = 0.001;
  kd212a = 1;
  k213 = 1;
  k213a = 1;
  k214 = 2e-6;
  k214a = 2e-6;
  k300 = 1e-7;
  k300a = 1e-7;
  kd300 = 0.001;
  kd300a = 0.001;
  k301 = 500000000;
  k301a = 500000000;
  kd301 = 0.5;
  kd301a = 0.5;
  k302 = 500000000;
  kd302 = 0.5;
  k303 = 500000000;
  kd303 = 0.5;

  // Reactions:
  rxn_0: $IGF + IGFR -> IGF__IGFR; k1*IGF*IGFR - kd1*IGF__IGFR; rxn_0 is "1. IGF binding";  // fast
  rxn_1: IGF__IGFR => IGF__IGFR_p; k2*IGF__IGFR; rxn_1 is "1. IGF phospho";  // fast
  rxn_2: $IGF + IGFR_p -> IGF__IGFR_p; k1a*IGF*IGFR_p - kd1a*IGF__IGFR_p; rxn_2 is "1. IGF binding_1";  // fast
  rxn_3: IGF__IGFR_p + PTB1B -> IGF__IGFR_p__PTB1B; k3*IGF__IGFR_p*PTB1B - kd3*IGF__IGFR_p__PTB1B; rxn_3 is "2. PTB1B";  // fast
  rxn_4: IGFR_p + PTB1B -> IGFR_p__PTB1B; k3a*IGFR_p*PTB1B - kd3a*IGFR_p__PTB1B; rxn_4 is "2. PTB1B_1";  // fast
  rxn_5: IGF__IGFR + PTB1B -> IGF__IGFR_p__PTB1B; k4*IGF__IGFR*PTB1B - kd4*IGF__IGFR_p__PTB1B; rxn_5 is "2. PTB1B_2";  // fast
  rxn_6: IGFR + PTB1B -> IGFR_p__PTB1B; k4a*IGFR*PTB1B - kd4a*IGFR_p__PTB1B; rxn_6 is "2. PTB1B_3";  // fast
  rxn_7: IRS + IGF__IGFR_p -> IRS__IGF__IGFR_p; k5*IRS*IGF__IGFR_p - kd5*IRS__IGF__IGFR_p; rxn_7 is "3. IRS";  // fast
  rxn_8: IRS__IGF__IGFR_p => IRS_p__IGF__IGFR_p; k6*IRS__IGF__IGFR_p; rxn_8 is "3. IRS_1";  // fast
  rxn_9: IRS + IGFR_p -> IRS__IGFR_p; k5a*IRS*IGFR_p - kd5a*IRS__IGFR_p; rxn_9 is "3. IRS_2";  // fast
  rxn_10: IRS__IGFR_p => IRS_p__IGFR_p; k6a*IRS__IGFR_p; rxn_10 is "3. IRS_3";  // fast
  rxn_11: IRS_p + IGFR_p -> IRS_p__IGFR_p; k7*IRS_p*IGFR_p - kd7*IRS_p__IGFR_p; rxn_11 is "3. IRS_4";  // fast
  rxn_12: IRS_p + IGF__IGFR_p -> IRS_p__IGF__IGFR_p; k7a*IRS_p*IGF__IGFR_p - kd7a*IRS_p__IGF__IGFR_p; rxn_12 is "3. IRS_5";  // fast
  rxn_13: IRS_p + PI3K -> IRS_p__PI3K; k100*IRS_p*PI3K - kd100*IRS_p__PI3K; rxn_13 is "4. PI3K";  // fast
  rxn_14: IRS_p__PI3K + AKT -> IRS_p__PI3K__AKT; k101*IRS_p__PI3K*AKT - kd101*IRS_p__PI3K__AKT; rxn_14 is "5. AKT pathway";  // fast
  rxn_15: IRS_p__PI3K__AKT => IRS_p__PI3K__AKT_p; k102*IRS_p__PI3K__AKT; rxn_15 is "5. AKT pathway INACTIVE";
  rxn_16: IRS_p__PI3K__AKT => AKT_p + IRS_p__PI3K; k103*IRS_p__PI3K__AKT; rxn_16 is "5. AKT pathway_1";  // fast
  rxn_17: Pase + AKT_p -> Pase__AKT_p; k104*Pase*AKT_p - kd104*Pase__AKT_p; rxn_17 is "5. AKT pathway_2";  // fast
  rxn_18: Pase + AKT -> Pase__AKT_p; k105*Pase*AKT - kd105*Pase__AKT_p; rxn_18 is "5. AKT pathway_3";  // fast
  rxn_19: mTor + AKT_p -> AKT_p__mTor; k106*mTor*AKT_p - kd106*AKT_p__mTor; rxn_19 is "5. AKT pathway_4";  // fast
  rxn_20: AKT_p__mTor => mTor_p + AKT_p; k107*AKT_p__mTor; rxn_20 is "5. AKT pathway_5";  // fast
  rxn_21: IRS_p__PI3K__AKT + mTor_p => mTor_p__IRS_p__PI3K__AKT; k108*IRS_p__PI3K__AKT*mTor_p; rxn_21 is "6. IRS inhibition";  // fast
  rxn_22: IRS_p + mTor_p => mTor_p__IRS_p; k108*IRS_p*mTor_p; rxn_22 is "6. IRS inhibition_1";  // fast
  rxn_23: IRS_p__PI3K + mTor_p => mTor_p__IRS_p__PI3K; k108*IRS_p__PI3K*mTor_p; rxn_23 is "6. IRS inhibition_2";  // fast
  rxn_24: IRS + mTor_p => mTor_p__IRS; k108*IRS*mTor_p; rxn_24 is "6. IRS inhibition_3";  // fast
  rxn_25: IRS_p__Grb2SOS + mTor_p => mTor_p__IRS_p__Grb2SOS; k108*IRS_p__Grb2SOS*mTor_p; rxn_25 is "6. IRS inhibition_4";  // fast
  rxn_26: IRS_p__PI3K__Grb2SOS + mTor_p => mTor_p__IRS_p__PI3K__Grb2SOS; k108*IRS_p__PI3K__Grb2SOS*mTor_p; rxn_26 is "6. IRS inhibition_5";  // fast
  rxn_27: IRS_p__PI3K__PI3Kinh + mTor_p => mTor_p__IRS_p__PI3K__PI3Kinh; k108*IRS_p__PI3K__PI3Kinh*mTor_p; rxn_27 is "6. IRS inhibition_6";  // fast
  rxn_28: IRS_p__PI3K__AKT__AKTinh + mTor_p => mTor_p__IRS_p__PI3K__AKT__AKTinh; k108*IRS_p__PI3K__AKT__AKTinh*mTor_p; rxn_28 is "6. IRS inhibition_7";  // fast
  rxn_29: IRS_p__Grb2SOS__RasGDP + mTor_p => mTor_p__IRS_p__Grb2SOS__RasGDP; k108*IRS_p__Grb2SOS__RasGDP*mTor_p; rxn_29 is "6. IRS inhibition_8";  // fast
  rxn_30: IRS_p__PI3K__Grb2SOS__RasGDP + mTor_p => mTor_p__IRS_p__PI3K__Grb2SOS__RasGDP; k108*IRS_p__PI3K__Grb2SOS__RasGDP*mTor_p; rxn_30 is "6. IRS inhibition_9";  // fast
  rxn_31: Grb2SOS + IRS_p -> IRS_p__Grb2SOS; k200*Grb2SOS*IRS_p - kd200*IRS_p__Grb2SOS; rxn_31 is "7. Grb2SOS";  // fast
  rxn_32: Grb2SOS + IRS_p__PI3K -> IRS_p__PI3K__Grb2SOS; k200a*Grb2SOS*IRS_p__PI3K - kd200a*IRS_p__PI3K__Grb2SOS; rxn_32 is "7. Grb2SOS_1";  // fast
  rxn_33: IRS_p__Grb2SOS + RasGDP -> IRS_p__Grb2SOS__RasGDP; k201*IRS_p__Grb2SOS*RasGDP - kd201*IRS_p__Grb2SOS__RasGDP; rxn_33 is "7. Grb2SOS_2";  // fast
  rxn_34: IRS_p__PI3K__Grb2SOS + RasGDP -> IRS_p__PI3K__Grb2SOS__RasGDP; k201a*IRS_p__PI3K__Grb2SOS*RasGDP - kd201a*IRS_p__PI3K__Grb2SOS__RasGDP; rxn_34 is "7. Grb2SOS_3";  // fast
  rxn_35: IRS_p__Grb2SOS__RasGDP => RasGTP + IRS_p__Grb2SOS; k202*IRS_p__Grb2SOS__RasGDP; rxn_35 is "7. Grb2SOS_4";  // fast
  rxn_36: IRS_p__PI3K__Grb2SOS__RasGDP => RasGTP + IRS_p__PI3K__Grb2SOS; k202a*IRS_p__PI3K__Grb2SOS__RasGDP; rxn_36 is "7. Grb2SOS_5";  // fast
  rxn_37: AKT_p + RasGDP => AKT_p__RasGDP; k203*AKT_p*RasGDP; rxn_37 is "8. RasGDP inhibition";  // fast
  rxn_38: AKT_p + RasGTP => AKT_p__RasGTP; k203a*AKT_p*RasGTP; rxn_38 is "8. RasGTP inhibition INACTIVE";
  rxn_39: RasGTP + GTPase -> RasGTP__GTPase; k204*RasGTP*GTPase - kd204*RasGTP__GTPase; rxn_39 is "9. MAPK cascade";  // fast
  rxn_40: RasGTP__GTPase => GTPase + RasGDP; k205*RasGTP__GTPase; rxn_40 is "9. MAPK cascade_1";  // fast
  rxn_41: RasGTP + MEK -> RasGTP__MEK; k206*RasGTP*MEK - kd206*RasGTP__MEK; rxn_41 is "9. MAPK cascade_2";  // fast
  rxn_42: RasGTP__MEK => RasGTP__MEK_p; k207*RasGTP__MEK; rxn_42 is "9. MAPK cascade_3";  // fast
  rxn_43: RasGTP__MEK_p => MEK_p + RasGTP; k207a*RasGTP__MEK_p; rxn_43 is "9. MAPK cascade_4";  // fast
  rxn_44: P1 + MEK_p -> P1__MEK_p; k208*P1*MEK_p - kd208*P1__MEK_p; rxn_44 is "9. MAPK cascade_5";  // fast
  rxn_45: P1__MEK_p => P1 + MEK; k209*P1__MEK_p; rxn_45 is "9. MAPK cascade_6";  // fast
  rxn_46: ERK + MEK_p -> MEK_p__ERK; k210*ERK*MEK_p - kd210*MEK_p__ERK; rxn_46 is "9. MAPK cascade_7";  // fast
  rxn_47: MEK_p__ERK => MEK_p + ERK_p; k211*MEK_p__ERK; rxn_47 is "9. MAPK cascade_8";  // fast
  rxn_48: MKP + ERK_p -> MKP__ERK_p; k212*MKP*ERK_p - kd212*MKP__ERK_p; rxn_48 is "9. MAPK cascade_9";  // fast
  rxn_49: MKP__ERK_p => MKP + ERK; k213*MKP__ERK_p; rxn_49 is "9. MAPK cascade_10";  // fast
  rxn_50: ERK_p + MEK_p -> MEK_p__ERK_p; k210a*ERK_p*MEK_p - kd210a*MEK_p__ERK_p; rxn_50 is "9. MAPK cascade_11";  // fast
  rxn_51: MEK_p__ERK_p => ERK_p_p + MEK_p; k211a*MEK_p__ERK_p; rxn_51 is "9. MAPK cascade_12";  // fast
  rxn_52: ERK_p_p + MKP -> MKP__ERK_p_p; k212a*ERK_p_p*MKP - kd212a*MKP__ERK_p_p; rxn_52 is "9. MAPK cascade_13";  // fast
  rxn_53: MKP__ERK_p_p => ERK_p + MKP; k213a*MKP__ERK_p_p; rxn_53 is "9. MAPK cascade_14";  // fast
  rxn_54: ERK_p_p + IRS_p__Grb2SOS => ERK_p_p__IRS_p__Grb2SOS; k214*ERK_p_p*IRS_p__Grb2SOS; rxn_54 is "10. ERK feedback";  // fast
  rxn_55: ERK_p_p + IRS_p__PI3K__Grb2SOS => ERK_p_p__IRS_p__PI3K__Grb2SOS; k214a*ERK_p_p*IRS_p__PI3K__Grb2SOS; rxn_55 is "10. ERK feedback_1";  // fast
  rxn_56: PI3Kinh + PI3K -> PI3K__PI3Kinh; k300*PI3Kinh*PI3K - kd300*PI3K__PI3Kinh; rxn_56 is "20. PI3K inhibition (INACTIVE)";
  rxn_57: PI3Kinh + IRS_p__PI3K -> IRS_p__PI3K__PI3Kinh; k300a*PI3Kinh*IRS_p__PI3K - kd300a*IRS_p__PI3K__PI3Kinh; rxn_57 is "20. PI3K inhibition_1 (INACTIVE)";
  rxn_58: PI3K__PI3Kinh + IRS_p -> IRS_p__PI3K__PI3Kinh; k100a*PI3K__PI3Kinh*IRS_p - kd100a*IRS_p__PI3K__PI3Kinh; rxn_58 is "20. PI3K inhibition_2 (INACTIVE)";
  rxn_59: $AKTinh + AKT -> AKT__AKTinh; k301*AKTinh*AKT - kd301*AKT__AKTinh; rxn_59 is "21. AKT inhibition (INACTIVE)";
  rxn_60: $AKTinh + IRS_p__PI3K__AKT -> IRS_p__PI3K__AKT__AKTinh; k301a*AKTinh*IRS_p__PI3K__AKT - kd301a*IRS_p__PI3K__AKT__AKTinh; rxn_60 is "21. AKT inhibition_1 (INACTIVE)";
  rxn_61: AKT__AKTinh + IRS_p__PI3K -> IRS_p__PI3K__AKT__AKTinh; k101a*AKT__AKTinh*IRS_p__PI3K - kd101a*IRS_p__PI3K__AKT__AKTinh; rxn_61 is "21. AKT inhibition_2 (INACTIVE)";
  rxn_62: IGFR + $IGFRinh -> IGFR__IGFRinh; k302*IGFR*IGFRinh - kd302*IGFR__IGFRinh; rxn_62 is "22. IGFR inhibitor (INACTIVE)";
  rxn_63: $mTorinh + mTor -> mTor__mTorinh; k303*mTorinh*mTor - kd303*mTor__mTorinh; rxn_63 is "21. mTor inhibition (INACTIVE)";
end
